f1(x) := sin(x - 0.6) - 1.6
f2(y) := (cos(y) + 0.9)/3
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Prov(a, b, y) :=
    q ← |d/da(y(a))|
    q ← |d/db(y(b))| if |d/db(y(b))| > |d/da(y(a))|
    return q
Prov(0, 0.3, f1) = 0.955336
Prov(-3, -1.5, f2) = 0.332498
Iter(a, b, c, d, e, f1, f2) :=
    k ← 1
    q ← max(|d/da(f1(a))|, |d/db(f1(b))|, |d/da(f2(c))|, |d/db(f2(d))|)
    x0 ← b
    y0 ← d
    x1 ← f2(y0)
    y1 ← f1(x0)
    while (|x1 - x0| + |y1 - y0|)*q/(1 - q) > e
        x0 ← x1
        y0 ← y1
        x1 ← f2(y0)
        y1 ← f1(x0)
        k ← k + 1
    return [x1, y1, k]
Iter(0, 0.3, -3, -1.5, 0.001, f1, f2) = [0.151062, -2.034, 16]
Iter(a, b, c, d, e, f1, f2) :=
    k ← 1
    q ← max(|d/da(f1(a))|, |d/db(f1(b))|, |d/da(f2(c))|, |d/db(f2(d))|)
    x0 ← b
    y0 ← d
    x1 ← f2(y0)
    y1 ← f1(x1)
    while (|x1 - x0| + |y1 - y0|)*q/(1 - q) > e
        x0 ← x1
        y0 ← y1
        x1 ← f2(y0)
        y1 ← f1(x1)
        k ← k + 1
    return [x1, y1, k]
Iter(0, 0.3, -3, -1.5, 0.001, f1, f2) = [0.151062, -2.03401, 9]
f1(x, y) := sin(x - 0.6) - y - 1.6
f2(x, y) := 3*x - cos(y) - 0.9
System(x0, y0, e) :=
    k ← 0
    x1 ← x0 - det([f1(x0, y0), d/dy0(f1(x0, y0)); f2(x0, y0), d/dy0(f2(x0, y0))])/det([d/dx0(f1(x0, y0)), d/dy0(f1(x0, y0)); d/dx0(f2(x0, y0)), d/dy0(f2(x0, y0))])
    y1 ← y0 - det([d/dx0(f1(x0, y0)), f1(x0, y0); d/dx0(f2(x0, y0)), f2(x0, y0)])/det([d/dx0(f1(x0, y0)), d/dy0(f1(x0, y0)); d/dx0(f2(x0, y0)), d/dy0(f2(x0, y0))])
    while |x1 - x0| > e or |y0 - y1| > e
        x0 ← x1
        y0 ← y1
        I(x0, y0) ← det([d/dx0(f1(x0, y0)), d/dy0(f1(x0, y0)); d/dx0(f2(x0, y0)), d/dy0(f2(x0, y0))])
        x1 ← x0 - det([f1(x0, y0), d/dy0(f1(x0, y0)); f2(x0, y0), d/dy0(f2(x0, y0))])/I(x0, y0)
        y1 ← y0 - det([d/dx0(f1(x0, y0)), f1(x0, y0); d/dx0(f2(x0, y0)), f2(x0, y0)])/I(x0, y0)
        k ← k + 1
    [x1, y1, k]
System(0.3, -3, 0.001) = [0.151057, -2.03401, 3]
